Test

#Mach
 0.42

#IYsym   IZsym   Zsym
 0       0       0.0

#Sref    Cref    Bref
45.0   2.5    18.0

#Xref    Yref    Zref
9.68     0.0     0.63
#--------------------------------------------------
SURFACE
Wing
#Nchordwise  Cspace  Nspanwise  Sspace
20           1.0     40         1.0

COMPONENT
1

YDUPLICATE
0.0

ANGLE
0.0

SCALE
1.0   1.0   1.0

TRANSLATE
5.0  0.0  1.5


SECTION
#Xle    Yle    Zle     Chord   Ainc  Nspanwise  Sspace
0.0    0.0    0.0     3.0    1.0
NACA
2412
CONTROL
flap     1.0  0.70  0. 0. 0.  +1

SECTION
#Xle    Yle    Zle     Chord   Ainc  Nspanwise  Sspace
0.16    0.45    0.0     2.95    1.0
NACA
2412
CONTROL
flap     1.0  0.70  0. 0. 0.  +1

SECTION
#Xle    Yle    Zle     Chord   Ainc  Nspanwise  Sspace
0.33    0.9    0.0     2.9    1.0
NACA
2412
CONTROL
flap     1.0  0.70  0. 0. 0.  +1

SECTION
#Xle    Yle    Zle     Chord   Ainc  Nspanwise  Sspace
0.49    1.35    0.0     2.85    1.0
NACA
2412
CONTROL
flap     1.0  0.70  0. 0. 0.  +1

SECTION
#Xle    Yle    Zle     Chord   Ainc  Nspanwise  Sspace
0.66    1.8    0.0     2.8    1.0
NACA
2412
CONTROL
flap     1.0  0.70  0. 0. 0.  +1

SECTION
#Xle    Yle    Zle     Chord   Ainc  Nspanwise  Sspace
0.82    2.25    0.0     2.75    1.0
NACA
2412
CONTROL
flap     1.0  0.70  0. 0. 0.  +1

SECTION
#Xle    Yle    Zle     Chord   Ainc  Nspanwise  Sspace
0.98    2.7    0.0     2.7    1.0
NACA
2412
CONTROL
flap     1.0  0.70  0. 0. 0.  +1

SECTION
#Xle    Yle    Zle     Chord   Ainc  Nspanwise  Sspace
1.15    3.15    0.0     2.65    1.0
NACA
2412
CONTROL
flap     1.0  0.70  0. 0. 0.  +1

SECTION
#Xle    Yle    Zle     Chord   Ainc  Nspanwise  Sspace
1.31    3.6    0.0     2.6    1.0
NACA
2412
CONTROL
flap     1.0  0.70  0. 0. 0.  +1

SECTION
#Xle    Yle    Zle     Chord   Ainc  Nspanwise  Sspace
1.47    4.05    0.0     2.55    1.0
NACA
2412
CONTROL
flap     1.0  0.70  0. 0. 0.  +1

SECTION
#Xle    Yle    Zle     Chord   Ainc  Nspanwise  Sspace
1.64    4.5    0.0     2.5    1.0
NACA
2412

SECTION
#Xle    Yle    Zle     Chord   Ainc  Nspanwise  Sspace
1.8    4.95    0.0     2.45    1.0
NACA
2412

SECTION
#Xle    Yle    Zle     Chord   Ainc  Nspanwise  Sspace
1.97    5.4    0.0     2.4    1.0
NACA
2412

SECTION
#Xle    Yle    Zle     Chord   Ainc  Nspanwise  Sspace
2.13    5.85    0.0     2.35    1.0
NACA
2412

SECTION
#Xle    Yle    Zle     Chord   Ainc  Nspanwise  Sspace
2.29    6.3    0.0     2.3    1.0
NACA
2412

SECTION
#Xle    Yle    Zle     Chord   Ainc  Nspanwise  Sspace
2.46    6.75    0.0     2.25    1.0
NACA
2412

SECTION
#Xle    Yle    Zle     Chord   Ainc  Nspanwise  Sspace
2.62    7.2    0.0     2.2    1.0
NACA
2412
CONTROL
aileron  1.0  0.80  0. 0. 0.  -1

SECTION
#Xle    Yle    Zle     Chord   Ainc  Nspanwise  Sspace
2.78    7.65    0.0     2.15    1.0
NACA
2412
CONTROL
aileron  1.0  0.80  0. 0. 0.  -1

SECTION
#Xle    Yle    Zle     Chord   Ainc  Nspanwise  Sspace
2.95    8.1    0.0     2.1    1.0
NACA
2412
CONTROL
aileron  1.0  0.80  0. 0. 0.  -1

SURFACE
Fuselage Horizontal
#Nchordwise  Cspace  Nspanwise  Sspace
10           1.0

COMPONENT
1

YDUPLICATE
0.0

ANGLE
0.0

SCALE
1.0   1.0   1.0

TRANSLATE
0.0  0.0  0.0


SECTION
#Xle    Yle    Zle     Chord   Ainc  Nspanwise  Sspace
0.0    0.0    0.0     20.0   0.    1          0.

SECTION
#Xle    Yle    Zle     Chord   Ainc  Nspanwise  Sspace
0.4    0.6    0.0     19.6   0.    1          0.

SECTION
#Xle    Yle    Zle     Chord   Ainc  Nspanwise  Sspace
0.8    1.2    0.0     19.2   0.    1          0.

SECTION
#Xle    Yle    Zle     Chord   Ainc  Nspanwise  Sspace
1.21    1.8    0.0     18.79   0.    1          0.

SURFACE
Fuselage V Upper
#Nchordwise  Cspace  Nspanwise  Sspace
10           1.0

COMPONENT
1

ANGLE
0.0

SCALE
1.0   1.0   1.0

TRANSLATE
0.0  0.0  0.0


SECTION
#Xle    Yle    Zle     Chord   Ainc  Nspanwise  Sspace
0.0    0.0    0.0     20.0   0.    1          0.

SECTION
#Xle    Yle    Zle     Chord   Ainc  Nspanwise  Sspace
0.5    0.0    0.5     17.5   0.    1          0.

SECTION
#Xle    Yle    Zle     Chord   Ainc  Nspanwise  Sspace
1.0    0.0    1.0     15.0   0.    1          0.

SECTION
#Xle    Yle    Zle     Chord   Ainc  Nspanwise  Sspace
1.5    0.0    1.5     12.5   0.    1          0.

SURFACE
Fuselage V Lower
#Nchordwise  Cspace  Nspanwise  Sspace
10           1.0

COMPONENT
1

ANGLE
0.0

SCALE
1.0   1.0   1.0

TRANSLATE
0.0  0.0  0.0


SECTION
#Xle    Yle    Zle     Chord   Ainc  Nspanwise  Sspace
0.0    0.0    -0.0     20.0   0.    1          0.

SECTION
#Xle    Yle    Zle     Chord   Ainc  Nspanwise  Sspace
0.29    0.0    -0.5     18.56   0.    1          0.

SECTION
#Xle    Yle    Zle     Chord   Ainc  Nspanwise  Sspace
0.58    0.0    -1.0     17.11   0.    1          0.

SECTION
#Xle    Yle    Zle     Chord   Ainc  Nspanwise  Sspace
0.87    0.0    -1.5     15.67   0.    1          0.

SURFACE
Horizontal Stabilizer
#Nchordwise  Cspace  Nspanwise  Sspace
10           1.0     20         1.0

COMPONENT
1

YDUPLICATE
0.0

ANGLE
0.0

SCALE
1.0   1.0   1.0

TRANSLATE
15.0  1.5  0.0


SECTION
#Xle    Yle    Zle     Chord   Ainc  Nspanwise  Sspace
0.0    0.0    0.0     2.0    0.0
NACA
0
CONTROL
elevator 1.0  0.70  0. 0. 0.  +1

SECTION
#Xle    Yle    Zle     Chord   Ainc  Nspanwise  Sspace
0.15    0.4    0.0     1.98    0.0
NACA
0
CONTROL
elevator 1.0  0.70  0. 0. 0.  +1

SECTION
#Xle    Yle    Zle     Chord   Ainc  Nspanwise  Sspace
0.29    0.8    0.0     1.96    0.0
NACA
0
CONTROL
elevator 1.0  0.70  0. 0. 0.  +1

SECTION
#Xle    Yle    Zle     Chord   Ainc  Nspanwise  Sspace
0.44    1.2    0.0     1.94    0.0
NACA
0
CONTROL
elevator 1.0  0.70  0. 0. 0.  +1

SECTION
#Xle    Yle    Zle     Chord   Ainc  Nspanwise  Sspace
0.58    1.6    0.0     1.92    0.0
NACA
0
CONTROL
elevator 1.0  0.70  0. 0. 0.  +1

SECTION
#Xle    Yle    Zle     Chord   Ainc  Nspanwise  Sspace
0.73    2.0    0.0     1.9    0.0
NACA
0
CONTROL
elevator 1.0  0.70  0. 0. 0.  +1

SECTION
#Xle    Yle    Zle     Chord   Ainc  Nspanwise  Sspace
0.87    2.4    0.0     1.88    0.0
NACA
0
CONTROL
elevator 1.0  0.70  0. 0. 0.  +1

SECTION
#Xle    Yle    Zle     Chord   Ainc  Nspanwise  Sspace
1.02    2.8    0.0     1.86    0.0
NACA
0
CONTROL
elevator 1.0  0.70  0. 0. 0.  +1

SECTION
#Xle    Yle    Zle     Chord   Ainc  Nspanwise  Sspace
1.16    3.2    0.0     1.84    0.0
NACA
0
CONTROL
elevator 1.0  0.70  0. 0. 0.  +1

SURFACE
Vertical Stabilizer
#Nchordwise  Cspace  Nspanwise  Sspace
10           1.0     20         1.0

COMPONENT
1

ANGLE
0.0

SCALE
1.0   1.0   1.0

TRANSLATE
15.0  0.0  0.5


SECTION
#Xle    Yle    Zle     Chord   Ainc  Nspanwise  Sspace
0.0    0.0    0.0     3.0    0.
CONTROL
rudder 1.0  0.70  0. 0. 0.  +1

SECTION
#Xle    Yle    Zle     Chord   Ainc  Nspanwise  Sspace
0.35    0.0    0.6     2.9    0.
CONTROL
rudder 1.0  0.70  0. 0. 0.  +1

SECTION
#Xle    Yle    Zle     Chord   Ainc  Nspanwise  Sspace
0.69    0.0    1.2     2.8    0.
CONTROL
rudder 1.0  0.70  0. 0. 0.  +1

SECTION
#Xle    Yle    Zle     Chord   Ainc  Nspanwise  Sspace
1.04    0.0    1.8     2.7    0.
CONTROL
rudder 1.0  0.70  0. 0. 0.  +1

SECTION
#Xle    Yle    Zle     Chord   Ainc  Nspanwise  Sspace
1.39    0.0    2.4     2.6    0.
CONTROL
rudder 1.0  0.70  0. 0. 0.  +1

SECTION
#Xle    Yle    Zle     Chord   Ainc  Nspanwise  Sspace
1.73    0.0    3.0     2.5    0.
CONTROL
rudder 1.0  0.70  0. 0. 0.  +1

SECTION
#Xle    Yle    Zle     Chord   Ainc  Nspanwise  Sspace
2.08    0.0    3.6     2.4    0.
CONTROL
rudder 1.0  0.70  0. 0. 0.  +1

SECTION
#Xle    Yle    Zle     Chord   Ainc  Nspanwise  Sspace
2.42    0.0    4.2     2.3    0.
CONTROL
rudder 1.0  0.70  0. 0. 0.  +1

SECTION
#Xle    Yle    Zle     Chord   Ainc  Nspanwise  Sspace
2.77    0.0    4.8     2.2    0.
CONTROL
rudder 1.0  0.70  0. 0. 0.  +1
