#  Test
#
#  Dimensional unit and parameter data.
#  Mass & Inertia breakdown.

Lunit = 1.0000 m
Munit = 1.000  kg
Tunit = 1.0    s
#-------------------------
g   = 9.81
rho = 1.225


#-------------------------
#  mass   x     y     z    [ Ixx     Iyy    Izz     Ixy   Ixz   Iyz ]
*   1.    1.    1.    1.     1.     1.      1.      1.    1.    1.
+   0.    0.    0.    0.     0.     0.      0.      0.    0.    0.
   1809.34   4.0   3.0   0    3409726.42    311687.82    311687.82     ! Wing
   1600.0   4.3   0.0   -1.0    333333.33    5333333.33    3200000.0     ! Fuselage
   180.0   16.2   2.0   0     8100.0    1406.25    1406.25     ! HStab
   220.0   16.3   0.0   0     9900.0    1718.75    1718.75     ! VStab
   1736.02   4.0   -3.0   1.5     0    0    0     ! BatL
   1736.02   4.0   3.0   1.5     0    0    0     ! BatR
   868.01   4.3   0.0   -1.0     0    0    0     ! BatF
